###############################################
# LAMMPS script for a polymer
###############################################

###
# Box and units  (use LJ units and periodic boundaries)
###

# Initialize simulation
units lj                # Use Lennard-Jones units
dimension 3             # 3D simulation
boundary p p p        # Periodic boundaries in all directions
atom_style full       # Simple atomic style, no bonds or charges
neighbor 5 bin

###
# Pair interactions require lists of neighbours to be calculated
###
neighbor 5 bin
neigh_modify every 1 delay 0 check yes

variable bsize equal 1000
variable rsize equal 1
##############################  gel #########################
variable bsizeh equal 2.5*${bsize}+${rsize}
variable bsizel equal 2.5*${bsize}-${rsize}
variable bsizeyzh equal ${bsize}/2+${rsize}
variable bsizeyzl equal ${bsize}/2-${rsize}
region box block -20 10020 0 ${bsize} 0 ${bsize}
create_box 35 box bond/types 2 angle/types 1 extra/bond/per/atom 20 extra/special/per/atom 20 extra/angle/per/atom 20 # Create box for 2 atom types

#set type * mass 1

# Override if passed from the command l

variable seed equal 1324657

#read_data DNA_coordinates_test.data extra/bond/per/atom 2 extra/special/per/atom 10 extra/angle/per/atom 2
read_data DNA_coordinates_21_small.data extra/bond/per/atom 2 extra/special/per/atom 10 extra/angle/per/atom 2 add append shift 500 500 500
#region region_DNA block ${bsizel} ${bsizeh} ${bsizeyzl} ${bsizeyzh} ${bsizeyzl} ${bsizeyzh}

#molecule DNA_28 DNA_results.templates_3_12400000_28
#create_atoms 0 random 1 123475 region_DNA mol DNA_28 126354 maxtry 3000 overlap 2
#molecule DNA_29 DNA_results.templates_3_12400000_29
#create_atoms 0 random 1 123475 region_DNA mol DNA_29 126354 maxtry 3000 overlap 2
mass * 1

restart 100000 polymer.restart_control_3
bond_style hybrid harmonic fene
special_bonds fene #<=== I M P O R T A N T prevents LJ from being counted twice
bond_coeff   1 fene  30   3   1.0   2.0  # Adjust sigma to 2.0 in FEN
bond_coeff 2 harmonic 30 2  # Bond type 2: Harmonic bond (DNA-protein crosslink)
## Between non-bonded atoms
pair_style   lj/cut 2.24492305924378     # The cutoff should be ~2.2449 when sigma = 2.0
pair_modify shift yes        # option to ensure energy is calculated corectly
#  pair_coeff for LJ, specify 4:
#    * atom type interacting with
#    * atom type
#    * energy
#    * mean diameter of the two atom types
#    * cutoff
pair_coeff   * * 2 2.4 2.64492305924378 # Adjust sigma to 2.0 in LJ
#pair_coeff 1 1 1 2 3.24494

print "pair!"


## angles
angle_style  cosine
angle_coeff   1  25.0
# this choice gives a polymer with the same persistence length as DNA

print "angle!"

# Immediately after switching to FENE and LJ
timestep 0.001

set type * charge -1

print "set!"

dump myDump all custom 5000 dump.control_3_small_21_200_1324657_2000000 id type mol x y z ix iy iz
# every 1000 time steps, each atom's id, type, x,y,z coords and x,y,z image flages are output.
# image flags count how many times each atom has moved through a periodic boundary

dump force_dump all custom 5000 forces.dump_control_3_small_21_200_1324657_2000000 id type x y z fx fy fz vx vy vz

compute myPairs all pair/local dist fx fy fz

compute bond_name all property/local batom1 batom2 btype
dump bond_name_dump all local 5000 dump.bond_name_control_3_small_21_200_1324657_2000000 index c_bond_name[3] c_bond_name[1] c_bond_name[2]

compute bond_local all bond/local dist engpot fx fy fz
dump bond_dump all local 5000 dump.bond_local_control_3_small_21_200_1324657_2000000 index c_bond_local[1] c_bond_local[2] c_bond_local[3] c_bond_local[4] c_bond_local[5]

compute angle_name all property/local aatom1 aatom2 aatom3 atype
dump angle_name_dump all local 5000 dump.angle_name_control_3_small_21_200_1324657_2000000 index c_angle_name[4] c_angle_name[1] c_angle_name[2] c_angle_name[3]

compute angle_local all angle/local eng theta
dump angle_dump all local 5000 dump.angle_local_control_3_small_21_200_1324657_2000000 index c_angle_local[1] c_angle_local[2]


compute pairForce all pair/local dist dx dy dz fx fy fz
compute bondForce all bond/local fx fy fz
dump force_dump1 all local 5000 forces.dump_pair c_pairForce[1] c_pairForce[2] c_pairForce[3] c_pairForce[4] c_pairForce[5] c_pairForce[6] c_pairForce[7]
dump force_dump2 all local 5000 forces.dump_bond c_bondForce[1] c_bondForce[2] c_bondForce[3]

# Monitor forces in the log file
#compute force all property/atom fx fy fz
#thermo_style custom step temp pe c_force[1] c_force[2] c_force[3]

fix xwalls all indent 10 plane x 3000 hi
fix xlowalls all indent 10 plane x 0 lo

#fix ywalls all indent 10 plane y ${bsize} hi
#fix ylowalls all indent 10 plane y 0 lo

#fix zwalls all indent 10 plane z ${bsize} hi
#fix zlowalls all indent 10 plane z 0 lo

thermo 10000


# Time integration (nve, as there's no thermostat needed)
fix 21 all nve           # Integrate using NVE (constant Energy)

fix 31 all langevin 1 1 1 1324657

write_dump all atom before_run_dump.atom
write_dump all custom before_run_dump.mol id type mol x y z ix iy iz

print "write!"

#run 0
       # Run the simulation for 1000 timesteps
#print "run0!"

minimize 1.0e-4 1.0e-6 100 1000

print "minimize!"
#minimize 1.0e-4 1.0e-6 100 1000
#minimize 1.0e-4 1.0e-6 100 1000

timestep 0.01

run 1000000

fix 41 all efield -1.5 0.0 0.0  # Apply electric field with strength 1.0 in the x-direction

timestep 0.002

unfix 21
unfix 31


unfix xwalls

         # Integrate using NVE (constant Energy)
fix 22 all nve           # Integrate using NVE (constant Energy)

fix 32 all langevin 1 1 1 1324657


#unfix xlowalls


# Loop to create spheres with random radii and positions
# Loop to create spheres with random radii and positions
label loop_start1

# Generate random positions for the sphere
variable xpos1 equal random(330,10020,${seed})
variable xpos2 equal random(330,10020,${seed})
variable ypos equal random(0,${bsize},${seed})
variable zpos equal random(0,${bsize},${seed})
variable radius equal random(1,3,${seed})
# Create the sphere indenter with the current radius and position


# Increment the loop counter
variable i loop 200
region regiony${i} cylinder y ${xpos1} ${zpos} ${radius} 0 ${bsize}
region regionz${i} cylinder z ${xpos2} ${ypos} ${radius} 0 ${bsize}
print "region $i y ${xpos1} ${zpos} ${radius} "
print "region $i z ${xpos2} ${ypos} ${radius} "
next i
jump in.control_3_small_21_200_1324657 loop_start1

region region_combined union 400 regiony1 regionz1 regiony2 regionz2 regiony3 regionz3 regiony4 regionz4 regiony5 regionz5 regiony6 regionz6 regiony7 regionz7 regiony8 regionz8 regiony9 regionz9 regiony10 regionz10 regiony11 regionz11 regiony12 regionz12 regiony13 regionz13 regiony14 regionz14 regiony15 regionz15 regiony16 regionz16 regiony17 regionz17 regiony18 regionz18 regiony19 regionz19 regiony20 regionz20 regiony21 regionz21 regiony22 regionz22 regiony23 regionz23 regiony24 regionz24 regiony25 regionz25 regiony26 regionz26 regiony27 regionz27 regiony28 regionz28 regiony29 regionz29 regio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

timestep 0.002

# Define a loop that repeats the region selection and grouping process every 1000 timesteps
variable step equal 5000
variable n loop 2000  # Adjust this to control how many times the process repeats
# Create an empty group to store all the atoms from the identified molecules
group newgroup empty
group combined_combined_group empty
dump dumpnew newgroup custom 1000 group_output_100_30.txt id mol type x y z
dump dumpcombined combined_combined_group custom 1000 group_combined_output_100_30.txt id mol type x y z
label loop_step

    # Group atoms within the region
  group combined_group region region_combined
  group combined_combined_group union combined_combined_group combined_group

        # Assume 'oldgroup' is the group you want to work with

    # Step 1: Determine the number of atoms in 'oldgroup'
    variable numatoms equal count(combined_group)
    #variable num_atoms equal ${numatoms}


    # Step 2: Loop over all atoms in the old group
    #if numatoms==0, jump
    print "${numatoms}"
    if "${numatoms} == 0" then "jump in.control_3_small_21_200_1324657 skip_newgroup"
    variable atomID atom gmask(combined_group)    #all atoms in that region
    #print "atomID: v_atomID"
    variable total_atoms equal count(all)
    variable atomi loop ${total_atoms}  #iterate for every atom
    label loop_start
      # Get the atom ID for the i-th atom in 'oldgroup'

     #variable vtest equal v_atomID[1]
      # Get the molecule ID for that atom
      variable vtest equal v_atomID[v_atomi]

      if "${vtest}==0" then "jump in.control_3_small_21_200_1324657 skip_group"
      # Add all atoms with this molecule ID to a temporary group
      variable molid equal mol[v_atomi]
      print "v ${atomi} ${vtest} ${molid}"
      group tempgroup molecule ${molid}
      variable newgroup_atoms equal count(tempgroup)
      #print "now tempgroup atoms ${newgroup_atoms}"
      # Union the temporary group with the new group
      group newgroup union newgroup tempgroup
      group tempgroup clear
        label skip_group
    next atomi
    jump in.control_3_small_21_200_1324657 loop_start

    # Optional: Output the new group details
    print "New group 'newgroup' now contains all atoms from the molecules of the atoms in 'oldgroup'"

  label skip_newgroup
  # Optional: Apply operations to the combined group

fix fix_viscous newgroup viscous 10

  # Run for 1000 timesteps
  run ${step} every 1000 "print 'Selected new regions and updated groups.'"

  unfix fix_viscous
  group combined_group delete
  group combined_combined_group clear
  group newgroup clear


next n
jump in.control_3_small_21_200_1324657 loop_step


#fix yzwalls dna wall/reflect ylo 0 yhi 108 zlo 0 zhi 108
thermo_modify lost warn lost/bond warn
